# OpenSim document version 30000
Model lowerlimbmodel:
  credits: Chetan Thakur
  length_units: meters
  force_units: N
  gravity: 0 -9.81 0
  BodySet:
    Body ground: mass=0 mass_center=(0 0 0) inertia_xx=1 inertia_yy=1 inertia_zz=1 meshes=checkered_floor.vtp
    Body link1: mass=5 mass_center=(0 0.25 0) inertia_xx=0.1049479 inertia_yy=0.0015625 inertia_zz=0.1049479
        meshes=cylinder.vtp
      PinJoint hip: parent_body=ground location_in_parent=(0 0 0) location=(0 0.5 0)
        Coordinate q1: motion_type=rotational range=(0 1.570796)
  ForceSet:
    PgmActuator: pgm_rest_length=0.3
      PathPoint ground_1: ground (0.3 0 0)
      PathPoint link_1: link1 (0 0 0)
  ControllerSet Controllers:
    PrescribedController:
      FunctionSet ControlFunctions: PiecewiseConstantFunction(x=0 1 2 3 4 5 6, y=0 0 0.05 0.05 0.05 0 0)
